OpenVSP model (file version 5), 5 components.
Geometry view with OpenVSP parameter names; values to 6 digits, angles in degrees, lengths in the model's unit.
Overall bounding box: X_Min=-0.09 X_Len=0.54 Y_Min=-0.649975 Y_Len=1.29995 Z_Min=-0.0282084 Z_Len=0.228208

Wing "WingGeom"
  location (X Y Z) 0 0 0, rotation 0 0 0
  symmetric about XZ
  bounding box size 0.300061 1.29995 0.0304941
  mass: Density=45 Shell_Flag=0 Mass_Area=1 Mass_Prior=1
  totals: TotalSpan=1.3 TotalProjectedSpan=1.29995 TotalChord=0.21 TotalArea=0.273 TotalAR=6.19
  root: chord 0.3, twist 0, airfoil file "TL54 mod 1 h7m1h85m1.5"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 BaseThickChord=0.100285 ThickChord=0.100285
  sections:
    n  Span  Root_Chord  Tip_Chord  Area    Sweep  Sweep_Location  Dihedral  Twist  Twist_Location  tip airfoil
    1  0.65  0.3         0.12       0.1365  0      0               0.5       0      0.25            as above
  SS_Control "Ale": UStart=0.47 UEnd=0.67 Length_C_Start=0.25 Length_C_End=0.25 Length_Start=0.0565637 Length_End=0.0300073 LE_Flag=0 Surf_Type=2
  SS_Control "Ele": UStart=0.33 UEnd=0.47 Length_C_Start=0.25 Length_C_End=0.25 Length_Start=0.0750182 Length_End=0.0565637 LE_Flag=0 Surf_Type=2

Wing "FinGeom"
  location (X Y Z) 0.3 0 0, rotation 90 0 0
  bounding box size 0.15 0.0150087 0.2
  mass: Density=45 Shell_Flag=0 Mass_Area=1 Mass_Prior=1
  totals: TotalSpan=0.2 TotalProjectedSpan=0.2 TotalChord=0.115 TotalArea=0.023 TotalAR=1.73913
  root: chord 0.15, twist 0, NACA 4-series Camber=0 CamberLoc=0.2 ThickChord=0.1
  sections:
    n  Span  Root_Chord  Tip_Chord  Area   Sweep  Sweep_Location  Dihedral  Twist  Twist_Location  tip airfoil
    1  0.2   0.15        0.08       0.023  15     0               0         0      0.25            as above

Mesh "MeshGeom"
  location (X Y Z) 0 0 0, rotation 0 0 0

Fuselage "FuselageGeom"
  location (X Y Z) -0.09 0 0, rotation 0 0 0
  bounding box size 0.45 0.0564168 0.0564168
  mass: Density=44 Shell_Flag=0 Mass_Area=1 Mass_Prior=0
  Design: Length=0.45
  cross sections:
    n  XLocPercent  YLocPercent  ZLocPercent  shape
    0  0            0            0            circle Circle_Diameter=0.0564168
    1  1            0            0            as above

Mesh "MeshGeom"
  location (X Y Z) 0 0 0, rotation 0 0 0

VSPAERO settings: Sref=0.273 bref=1.3 cref=0.21 Xcg=0.045 Ycg=0.000175166 Zcg=-0.3 AlphaStart=-10 AlphaEnd=15 AlphaNpts=26 BetaStart=0 BetaEnd=0 BetaNpts=1 MachStart=0 MachEnd=0 MachNpts=1 ReCref=150000 Vinf=12 Rho=1.2255
  control group "AleRL": DeflectionAngle=0
  control group "EleEU": DeflectionAngle=0
  control group "AleREL": DeflectionAngle=0
  control group "EleEAU": DeflectionAngle=0
