OpenVSP model (file version 5), 1 components.
Geometry view with OpenVSP parameter names; values to 6 digits, angles in degrees, lengths in the model's unit.
Overall bounding box: X_Min=-0.000541578 X_Len=14.754 Y_Min=-7.999 Y_Len=15.998 Z_Min=-0.550503 Z_Len=1.38118

Wing "WingGeom"
  location (X Y Z) 0 0 0, rotation 0 0 0
  symmetric about XZ
  bounding box size 14.754 15.998 1.38118
  totals: TotalSpan=15.998 TotalProjectedSpan=15.998 TotalChord=5.1572 TotalArea=91.6511 TotalAR=2.7925 MAC=8.33602
  root: chord 14.7, twist 0, airfoil file "%029hpz-section-0"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 BaseThickChord=0.0939057 ThickChord=0.0939057
  sections:
    n  Span   Root_Chord  Tip_Chord  Area     Sweep  Sweep_Location  Dihedral  Twist   Twist_Location  tip airfoil
    1  2.4    14.7        7.379      26.4948  69     0               0         -0.388  0.25            airfoil file "%029hpz-section-1"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 BaseThickChord=0.0738291 ThickChord=0.0738291
    2  0.65   7.379       5.389      4.1496   69     0               0         -0.675  0.25            airfoil file "%029hpz-section-2"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 BaseThickChord=0.060581 ThickChord=0.060581
    3  1.85   5.389       2.784      7.56003  44     0               0         -2.1    0.25            airfoil file "%029hpz-section-3"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 BaseThickChord=0.0639894 ThickChord=0.0639894
    4  2.32   2.784       2.784      6.45888  44     0               0         -3.095  0.25            airfoil file "%029hpz-section-4"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 BaseThickChord=0.0568934 ThickChord=0.0568934
    5  0.779  2.784       0.2        1.16227  44     0               0         -3.095  0.25            NACA 4-series Camber=0 CamberLoc=0.2 ThickChord=0.1

VSPAERO settings (reference component "WingGeom"): Sref=91.6511 bref=15.998 cref=5.1572 Xcg=0 Ycg=0 Zcg=0 AlphaStart=5 AlphaEnd=10 AlphaNpts=1 BetaStart=0 BetaEnd=20 BetaNpts=5 MachStart=0 MachEnd=0 MachNpts=1 ReCref=3.54453e+07 Vinf=100 Rho=1.225
